*Heading
*Preprint, echo=NO, model=NO, history=NO, contact=NO
*Part, name=PART-1
*Node
  31831,           0.,         390.
  31844,           0.,         377.
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*Element, type=CPE4H
3000000, 567225, 567264, 567265, 567224
3000001, 567224, 567265, 567266, 567223
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*Element, type=CPE4R
5000000, 559574, 559575, 560045, 309441
5000001, 560044, 560045, 559575,  60706
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*Elset, elset=RING-1, generate
3000000, 3003783,       1
*Elset, elset=ROAD, generate
7200000, 7200119,       1
*Elset, elset=SPOKES, generate
     1,  10800,      1
*Elset, elset=TREAD, generate
4000000, 4001265,       1
*Elset, elset=SURF, generate
5000000, 5000929,       1
** Section: Section-5-SPOKES
*Solid Section, elset=SPOKES, material="PU-A-Neo Hookean"
168.,
** Section: Section-1-RING-1
*Solid Section, elset=RING-1, material="PU-A-Neo Hookean"
168.,
** Section: Section-2-TREAD
*Solid Section, elset=TREAD, material=TREAD
168.,
** Section: Section-3-SURF
*Solid Section, elset=SURF, material=SURFACE
168.,
** Section: Section-4-ROAD
*Solid Section, elset=ROAD, material=HUB
168.,
*End Part
**
**
** ASSEMBLY
**
*Assembly, name=Assembly
**
*Instance, name=PART-1-1, part=PART-1
*End Instance
**
*Node
      2,           0.,        -390.
      3,           0.,  -286.899994
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*Nset, nset=ROAD-RP
 2,
*Nset, nset=S-1
 3,
*Nset, nset=S-2
 4,
*Nset, nset=S-3
 5,
*Nset, nset=S-4
 6,
*Nset, nset=S-5
 7,
*Nset, nset=S-6
 8,
*Nset, nset=S-7
 9,
*Nset, nset=S-8
 10,
*Nset, nset=S-9
 11,
*Nset, nset=S-10
 12,
*Nset, nset=S-11
 13,
*Nset, nset=S-12
 14,
*Nset, nset=S-13
 15,
*Nset, nset=S-14
 16,
*Nset, nset=S-15
 17,
*Nset, nset=S-16
 18,
*Nset, nset=S-17
 19,
*Nset, nset=S-18
 20,
*Nset, nset=S-19
 21,
*Nset, nset=S-20
 22,
*Nset, nset=S-21
 23,
*Nset, nset=S-22
 24,
*Nset, nset=S-23
 25,
*Nset, nset=S-24
 26,
*Nset, nset=S-25
 27,
*Nset, nset=S-26
 28,
*Nset, nset=S-27
 29,
*Nset, nset=S-28
 30,
*Nset, nset=S-29
 31,
*Nset, nset=S-30
 32,
*Nset, nset=S-31
 33,
*Nset, nset=S-32
 34,
*Nset, nset=S-33
 35,
*Nset, nset=S-34
 36,
*Nset, nset=S-35
 37,
*Nset, nset=S-36
 38,
*Nset, nset=S-37
 39,
*Nset, nset=S-38
 40,
*Nset, nset=S-39
 41,
*Nset, nset=S-40
 42,
*Nset, nset=S-41
 43,
*Nset, nset=S-42
 44,
*Nset, nset=S-43
 45,
*Nset, nset=S-44
 46,
*Nset, nset=S-45
 47,
*Nset, nset=S-46
 48,
*Nset, nset=S-47
 49,
*Nset, nset=S-48
 50,
*Nset, nset=S-49
 51,
*Nset, nset=S-50
 52,
*Nset, nset=S-51
 53,
*Nset, nset=S-52
 54,
*Nset, nset=S-53
 55,
*Nset, nset=S-54
 56,
*Nset, nset=S-55
 57,
*Nset, nset=S-56
 58,
*Nset, nset=S-57
 59,
*Nset, nset=S-58
 60,
*Nset, nset=S-59
 61,
*Nset, nset=S-60
 62,
*Nset, nset=S-61
 63,
*Nset, nset=S-62
 64,
*Nset, nset=S-63
 65,
*Nset, nset=S-64
 66,
*Nset, nset=S-65
 67,
*Nset, nset=S-66
 68,
*Nset, nset=S-67
 69,
*Nset, nset=S-68
 70,
*Nset, nset=S-69
 71,
*Nset, nset=S-70
 72,
*Nset, nset=S-71
 73,
*Nset, nset=S-72
 74,
*Nset, nset=SET-SPOKEENDS, generate
  3,  74,   1
*Elset, elset=_M34, internal, instance=PART-1-1, generate
5000000, 5000463,       1
*Elset, elset=_M48, internal, instance=PART-1-1, generate
5000000, 5000463,       1
*Elset, elset=_M63, internal, instance=PART-1-1, generate
5000000, 5000463,       1
*Elset, elset=_M77, internal, instance=PART-1-1, generate
5000000, 5000463,       1
*Elset, elset=_M90, internal, instance=PART-1-1, generate
5000000, 5000463,       1
*Elset, elset=_M103, internal, instance=PART-1-1, generate
5000000, 5000463,       1
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*Elset, elset=_M361, internal, instance=PART-1-1, generate
5000000, 5000929,       1
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*Nset, nset=_PickedSet362, internal
 2,
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*Elset, elset=_ROAD-TREAD_S4, internal, instance=PART-1-1, generate
7200000, 7200119,       1
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*Elset, elset=_RING1-SPOKE_S3_8, internal, instance=PART-1-1
3000003,3000007,3000019,3000023,3000027,3000043
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*Elset, elset=_RING1-SPOKE_S4_10, internal, instance=PART-1-1
3001828,3001840,3001844,3001860,3001864,3001868
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*Surface, type=ELEMENT, name=RING1-SPOKE
_RING1-SPOKE_S3_8, S3
_RING1-SPOKE_S4_10, S4
*Elset, elset=_RING1-TREAD_S1_8, internal, instance=PART-1-1
3000008,3000012,3000028,3000032,3000036,3000048
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*Elset, elset=_RING1-TREAD_S2_10, internal, instance=PART-1-1
3001827,3001835,3001839,3001851,3001855,3001859
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*Surface, type=ELEMENT, name=RING1-TREAD
_RING1-TREAD_S1_8, S1
_RING1-TREAD_S2_10, S2
*Surface, type=ELEMENT, name=ROAD-TREAD
_ROAD-TREAD_S4, S4
*Elset, elset=_S-1_S3, internal, instance=PART-1-1
  75, 150
*Surface, type=ELEMENT, name=S-1
_S-1_S3, S3
*Elset, elset=_S-2_S3, internal, instance=PART-1-1
 225, 300
*Surface, type=ELEMENT, name=S-2
_S-2_S3, S3
*Elset, elset=_S-3_S3, internal, instance=PART-1-1
 375, 450
*Surface, type=ELEMENT, name=S-3
_S-3_S3, S3
*Elset, elset=_S-4_S3, internal, instance=PART-1-1
 525, 600
*Surface, type=ELEMENT, name=S-4
_S-4_S3, S3
*Elset, elset=_S-5_S3, internal, instance=PART-1-1
 675, 750
*Surface, type=ELEMENT, name=S-5
_S-5_S3, S3
*Elset, elset=_S-6_S3, internal, instance=PART-1-1
 825, 900
*Surface, type=ELEMENT, name=S-6
_S-6_S3, S3
*Elset, elset=_S-7_S3, internal, instance=PART-1-1
  975, 1050
*Surface, type=ELEMENT, name=S-7
_S-7_S3, S3
*Elset, elset=_S-8_S3, internal, instance=PART-1-1
 1125, 1200
*Surface, type=ELEMENT, name=S-8
_S-8_S3, S3
*Elset, elset=_S-9_S3, internal, instance=PART-1-1
 1275, 1350
*Surface, type=ELEMENT, name=S-9
_S-9_S3, S3
*Elset, elset=_S-10_S3, internal, instance=PART-1-1
 1425, 1500
*Surface, type=ELEMENT, name=S-10
_S-10_S3, S3
*Elset, elset=_S-11_S3, internal, instance=PART-1-1
 1575, 1650
*Surface, type=ELEMENT, name=S-11
_S-11_S3, S3
*Elset, elset=_S-12_S3, internal, instance=PART-1-1
 1725, 1800
*Surface, type=ELEMENT, name=S-12
_S-12_S3, S3
*Elset, elset=_S-13_S3, internal, instance=PART-1-1
 1875, 1950
*Surface, type=ELEMENT, name=S-13
_S-13_S3, S3
*Elset, elset=_S-14_S3, internal, instance=PART-1-1
 2025, 2100
*Surface, type=ELEMENT, name=S-14
_S-14_S3, S3
*Elset, elset=_S-15_S3, internal, instance=PART-1-1
 2175, 2250
*Surface, type=ELEMENT, name=S-15
_S-15_S3, S3
*Elset, elset=_S-16_S3, internal, instance=PART-1-1
 2325, 2400
*Surface, type=ELEMENT, name=S-16
_S-16_S3, S3
*Elset, elset=_S-17_S3, internal, instance=PART-1-1
 2475, 2550
*Surface, type=ELEMENT, name=S-17
_S-17_S3, S3
*Elset, elset=_S-18_S3, internal, instance=PART-1-1
 2625, 2700
*Surface, type=ELEMENT, name=S-18
_S-18_S3, S3
*Elset, elset=_S-19_S3, internal, instance=PART-1-1
 2775, 2850
*Surface, type=ELEMENT, name=S-19
_S-19_S3, S3
*Elset, elset=_S-20_S3, internal, instance=PART-1-1
 2925, 3000
*Surface, type=ELEMENT, name=S-20
_S-20_S3, S3
*Elset, elset=_S-21_S3, internal, instance=PART-1-1
 3075, 3150
*Surface, type=ELEMENT, name=S-21
_S-21_S3, S3
*Elset, elset=_S-22_S3, internal, instance=PART-1-1
 3225, 3300
*Surface, type=ELEMENT, name=S-22
_S-22_S3, S3
*Elset, elset=_S-23_S3, internal, instance=PART-1-1
 3375, 3450
*Surface, type=ELEMENT, name=S-23
_S-23_S3, S3
*Elset, elset=_S-24_S3, internal, instance=PART-1-1
 3525, 3600
*Surface, type=ELEMENT, name=S-24
_S-24_S3, S3
*Elset, elset=_S-25_S3, internal, instance=PART-1-1
 3675, 3750
*Surface, type=ELEMENT, name=S-25
_S-25_S3, S3
*Elset, elset=_S-26_S3, internal, instance=PART-1-1
 3825, 3900
*Surface, type=ELEMENT, name=S-26
_S-26_S3, S3
*Elset, elset=_S-27_S3, internal, instance=PART-1-1
 3975, 4050
*Surface, type=ELEMENT, name=S-27
_S-27_S3, S3
*Elset, elset=_S-28_S3, internal, instance=PART-1-1
 4125, 4200
*Surface, type=ELEMENT, name=S-28
_S-28_S3, S3
*Elset, elset=_S-29_S3, internal, instance=PART-1-1
 4275, 4350
*Surface, type=ELEMENT, name=S-29
_S-29_S3, S3
*Elset, elset=_S-30_S3, internal, instance=PART-1-1
 4425, 4500
*Surface, type=ELEMENT, name=S-30
_S-30_S3, S3
*Elset, elset=_S-31_S3, internal, instance=PART-1-1
 4575, 4650
*Surface, type=ELEMENT, name=S-31
_S-31_S3, S3
*Elset, elset=_S-32_S3, internal, instance=PART-1-1
 4725, 4800
*Surface, type=ELEMENT, name=S-32
_S-32_S3, S3
*Elset, elset=_S-33_S3, internal, instance=PART-1-1
 4875, 4950
*Surface, type=ELEMENT, name=S-33
_S-33_S3, S3
*Elset, elset=_S-34_S3, internal, instance=PART-1-1
 5025, 5100
*Surface, type=ELEMENT, name=S-34
_S-34_S3, S3
*Elset, elset=_S-35_S3, internal, instance=PART-1-1
 5175, 5250
*Surface, type=ELEMENT, name=S-35
_S-35_S3, S3
*Elset, elset=_S-36_S3, internal, instance=PART-1-1
 5325, 5400
*Surface, type=ELEMENT, name=S-36
_S-36_S3, S3
*Elset, elset=_S-37_S3, internal, instance=PART-1-1
 5475, 5550
*Surface, type=ELEMENT, name=S-37
_S-37_S3, S3
*Elset, elset=_S-38_S3, internal, instance=PART-1-1
 5625, 5700
*Surface, type=ELEMENT, name=S-38
_S-38_S3, S3
*Elset, elset=_S-39_S3, internal, instance=PART-1-1
 5775, 5850
*Surface, type=ELEMENT, name=S-39
_S-39_S3, S3
*Elset, elset=_S-40_S3, internal, instance=PART-1-1
 5925, 6000
*Surface, type=ELEMENT, name=S-40
_S-40_S3, S3
*Elset, elset=_S-41_S3, internal, instance=PART-1-1
 6075, 6150
*Surface, type=ELEMENT, name=S-41
_S-41_S3, S3
*Elset, elset=_S-42_S3, internal, instance=PART-1-1
 6225, 6300
*Surface, type=ELEMENT, name=S-42
_S-42_S3, S3
*Elset, elset=_S-43_S3, internal, instance=PART-1-1
 6375, 6450
*Surface, type=ELEMENT, name=S-43
_S-43_S3, S3
*Elset, elset=_S-44_S3, internal, instance=PART-1-1
 6525, 6600
*Surface, type=ELEMENT, name=S-44
_S-44_S3, S3
*Elset, elset=_S-45_S3, internal, instance=PART-1-1
 6675, 6750
*Surface, type=ELEMENT, name=S-45
_S-45_S3, S3
*Elset, elset=_S-46_S3, internal, instance=PART-1-1
 6825, 6900
*Surface, type=ELEMENT, name=S-46
_S-46_S3, S3
*Elset, elset=_S-47_S3, internal, instance=PART-1-1
 6975, 7050
*Surface, type=ELEMENT, name=S-47
_S-47_S3, S3
*Elset, elset=_S-48_S3, internal, instance=PART-1-1
 7125, 7200
*Surface, type=ELEMENT, name=S-48
_S-48_S3, S3
*Elset, elset=_S-49_S3, internal, instance=PART-1-1
 7275, 7350
*Surface, type=ELEMENT, name=S-49
_S-49_S3, S3
*Elset, elset=_S-50_S3, internal, instance=PART-1-1
 7425, 7500
*Surface, type=ELEMENT, name=S-50
_S-50_S3, S3
*Elset, elset=_S-51_S3, internal, instance=PART-1-1
 7575, 7650
*Surface, type=ELEMENT, name=S-51
_S-51_S3, S3
*Elset, elset=_S-52_S3, internal, instance=PART-1-1
 7725, 7800
*Surface, type=ELEMENT, name=S-52
_S-52_S3, S3
*Elset, elset=_S-53_S3, internal, instance=PART-1-1
 7875, 7950
*Surface, type=ELEMENT, name=S-53
_S-53_S3, S3
*Elset, elset=_S-54_S3, internal, instance=PART-1-1
 8025, 8100
*Surface, type=ELEMENT, name=S-54
_S-54_S3, S3
*Elset, elset=_S-55_S3, internal, instance=PART-1-1
 8175, 8250
*Surface, type=ELEMENT, name=S-55
_S-55_S3, S3
*Elset, elset=_S-56_S3, internal, instance=PART-1-1
 8325, 8400
*Surface, type=ELEMENT, name=S-56
_S-56_S3, S3
*Elset, elset=_S-57_S3, internal, instance=PART-1-1
 8475, 8550
*Surface, type=ELEMENT, name=S-57
_S-57_S3, S3
*Elset, elset=_S-58_S3, internal, instance=PART-1-1
 8625, 8700
*Surface, type=ELEMENT, name=S-58
_S-58_S3, S3
*Elset, elset=_S-59_S3, internal, instance=PART-1-1
 8775, 8850
*Surface, type=ELEMENT, name=S-59
_S-59_S3, S3
*Elset, elset=_S-60_S3, internal, instance=PART-1-1
 8925, 9000
*Surface, type=ELEMENT, name=S-60
_S-60_S3, S3
*Elset, elset=_S-61_S3, internal, instance=PART-1-1
 9075, 9150
*Surface, type=ELEMENT, name=S-61
_S-61_S3, S3
*Elset, elset=_S-62_S3, internal, instance=PART-1-1
 9225, 9300
*Surface, type=ELEMENT, name=S-62
_S-62_S3, S3
*Elset, elset=_S-63_S3, internal, instance=PART-1-1
 9375, 9450
*Surface, type=ELEMENT, name=S-63
_S-63_S3, S3
*Elset, elset=_S-64_S3, internal, instance=PART-1-1
 9525, 9600
*Surface, type=ELEMENT, name=S-64
_S-64_S3, S3
*Elset, elset=_S-65_S3, internal, instance=PART-1-1
 9675, 9750
*Surface, type=ELEMENT, name=S-65
_S-65_S3, S3
*Elset, elset=_S-66_S3, internal, instance=PART-1-1
 9825, 9900
*Surface, type=ELEMENT, name=S-66
_S-66_S3, S3
*Elset, elset=_S-67_S3, internal, instance=PART-1-1
  9975, 10050
*Surface, type=ELEMENT, name=S-67
_S-67_S3, S3
*Elset, elset=_S-68_S3, internal, instance=PART-1-1
 10125, 10200
*Surface, type=ELEMENT, name=S-68
_S-68_S3, S3
*Elset, elset=_S-69_S3, internal, instance=PART-1-1
 10275, 10350
*Surface, type=ELEMENT, name=S-69
_S-69_S3, S3
*Elset, elset=_S-70_S3, internal, instance=PART-1-1
 10425, 10500
*Surface, type=ELEMENT, name=S-70
_S-70_S3, S3
*Elset, elset=_S-71_S3, internal, instance=PART-1-1
 10575, 10650
*Surface, type=ELEMENT, name=S-71
_S-71_S3, S3
*Elset, elset=_S-72_S3, internal, instance=PART-1-1
 10725, 10800
*Surface, type=ELEMENT, name=S-72
_S-72_S3, S3
*Elset, elset=_SPOKE-RING1_S1, internal, instance=PART-1-1, generate
     1,  10726,     75
*Surface, type=ELEMENT, name=SPOKE-RING1
_SPOKE-RING1_S1, S1
*Elset, elset=_TREAD-RING1_S2_13, internal, instance=PART-1-1, generate
4000450, 4000897,       3
*Elset, elset=_TREAD-RING1_S3_13, internal, instance=PART-1-1
4000902,4000905
*Elset, elset=_TREAD-RING1_S4_10, internal, instance=PART-1-1
4000000,4000003,4000006,4000009,4000012,4000015
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*Surface, type=ELEMENT, name=TREAD-RING1
_TREAD-RING1_S2_13, S2
_TREAD-RING1_S3_13, S3
_TREAD-RING1_S4_10, S4
*Elset, elset=_TREAD-ROAD_S4_12, internal, instance=PART-1-1
4000909,4000911,4000912,4000919,4000920,4000923
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*Surface, type=ELEMENT, name=TREAD-ROAD
_TREAD-ROAD_S4_12, S4
** Constraint: CONSTRAINT-1
*Coupling, constraint name=CONSTRAINT-1, ref node=S-1, surface=S-1
*Kinematic
** Constraint: CONSTRAINT-2
*Coupling, constraint name=CONSTRAINT-2, ref node=S-2, surface=S-2
*Kinematic
** Constraint: CONSTRAINT-3
*Coupling, constraint name=CONSTRAINT-3, ref node=S-3, surface=S-3
*Kinematic
** Constraint: CONSTRAINT-4
*Coupling, constraint name=CONSTRAINT-4, ref node=S-4, surface=S-4
*Kinematic
** Constraint: CONSTRAINT-5
*Coupling, constraint name=CONSTRAINT-5, ref node=S-5, surface=S-5
*Kinematic
** Constraint: CONSTRAINT-6
*Coupling, constraint name=CONSTRAINT-6, ref node=S-6, surface=S-6
*Kinematic
** Constraint: CONSTRAINT-7
*Coupling, constraint name=CONSTRAINT-7, ref node=S-7, surface=S-7
*Kinematic
** Constraint: CONSTRAINT-8
*Coupling, constraint name=CONSTRAINT-8, ref node=S-8, surface=S-8
*Kinematic
** Constraint: CONSTRAINT-9
*Coupling, constraint name=CONSTRAINT-9, ref node=S-9, surface=S-9
*Kinematic
** Constraint: CONSTRAINT-10
*Coupling, constraint name=CONSTRAINT-10, ref node=S-10, surface=S-10
*Kinematic
** Constraint: CONSTRAINT-11
*Coupling, constraint name=CONSTRAINT-11, ref node=S-11, surface=S-11
*Kinematic
** Constraint: CONSTRAINT-12
*Coupling, constraint name=CONSTRAINT-12, ref node=S-12, surface=S-12
*Kinematic
** Constraint: CONSTRAINT-13
*Coupling, constraint name=CONSTRAINT-13, ref node=S-13, surface=S-13
*Kinematic
** Constraint: CONSTRAINT-14
*Coupling, constraint name=CONSTRAINT-14, ref node=S-14, surface=S-14
*Kinematic
** Constraint: CONSTRAINT-15
*Coupling, constraint name=CONSTRAINT-15, ref node=S-15, surface=S-15
*Kinematic
** Constraint: CONSTRAINT-16
*Coupling, constraint name=CONSTRAINT-16, ref node=S-16, surface=S-16
*Kinematic
** Constraint: CONSTRAINT-17
*Coupling, constraint name=CONSTRAINT-17, ref node=S-17, surface=S-17
*Kinematic
** Constraint: CONSTRAINT-18
*Coupling, constraint name=CONSTRAINT-18, ref node=S-18, surface=S-18
*Kinematic
** Constraint: CONSTRAINT-19
*Coupling, constraint name=CONSTRAINT-19, ref node=S-19, surface=S-19
*Kinematic
** Constraint: CONSTRAINT-20
*Coupling, constraint name=CONSTRAINT-20, ref node=S-20, surface=S-20
*Kinematic
** Constraint: CONSTRAINT-21
*Coupling, constraint name=CONSTRAINT-21, ref node=S-21, surface=S-21
*Kinematic
** Constraint: CONSTRAINT-22
*Coupling, constraint name=CONSTRAINT-22, ref node=S-22, surface=S-22
*Kinematic
** Constraint: CONSTRAINT-23
*Coupling, constraint name=CONSTRAINT-23, ref node=S-23, surface=S-23
*Kinematic
** Constraint: CONSTRAINT-24
*Coupling, constraint name=CONSTRAINT-24, ref node=S-24, surface=S-24
*Kinematic
** Constraint: CONSTRAINT-25
*Coupling, constraint name=CONSTRAINT-25, ref node=S-25, surface=S-25
*Kinematic
** Constraint: CONSTRAINT-26
*Coupling, constraint name=CONSTRAINT-26, ref node=S-26, surface=S-26
*Kinematic
** Constraint: CONSTRAINT-27
*Coupling, constraint name=CONSTRAINT-27, ref node=S-27, surface=S-27
*Kinematic
** Constraint: CONSTRAINT-28
*Coupling, constraint name=CONSTRAINT-28, ref node=S-28, surface=S-28
*Kinematic
** Constraint: CONSTRAINT-29
*Coupling, constraint name=CONSTRAINT-29, ref node=S-29, surface=S-29
*Kinematic
** Constraint: CONSTRAINT-30
*Coupling, constraint name=CONSTRAINT-30, ref node=S-30, surface=S-30
*Kinematic
** Constraint: CONSTRAINT-31
*Coupling, constraint name=CONSTRAINT-31, ref node=S-31, surface=S-31
*Kinematic
** Constraint: CONSTRAINT-32
*Coupling, constraint name=CONSTRAINT-32, ref node=S-32, surface=S-32
*Kinematic
** Constraint: CONSTRAINT-33
*Coupling, constraint name=CONSTRAINT-33, ref node=S-33, surface=S-33
*Kinematic
** Constraint: CONSTRAINT-34
*Coupling, constraint name=CONSTRAINT-34, ref node=S-34, surface=S-34
*Kinematic
** Constraint: CONSTRAINT-35
*Coupling, constraint name=CONSTRAINT-35, ref node=S-35, surface=S-35
*Kinematic
** Constraint: CONSTRAINT-36
*Coupling, constraint name=CONSTRAINT-36, ref node=S-36, surface=S-36
*Kinematic
** Constraint: CONSTRAINT-37
*Coupling, constraint name=CONSTRAINT-37, ref node=S-37, surface=S-37
*Kinematic
** Constraint: CONSTRAINT-38
*Coupling, constraint name=CONSTRAINT-38, ref node=S-38, surface=S-38
*Kinematic
** Constraint: CONSTRAINT-39
*Coupling, constraint name=CONSTRAINT-39, ref node=S-39, surface=S-39
*Kinematic
** Constraint: CONSTRAINT-40
*Coupling, constraint name=CONSTRAINT-40, ref node=S-40, surface=S-40
*Kinematic
** Constraint: CONSTRAINT-41
*Coupling, constraint name=CONSTRAINT-41, ref node=S-41, surface=S-41
*Kinematic
** Constraint: CONSTRAINT-42
*Coupling, constraint name=CONSTRAINT-42, ref node=S-42, surface=S-42
*Kinematic
** Constraint: CONSTRAINT-43
*Coupling, constraint name=CONSTRAINT-43, ref node=S-43, surface=S-43
*Kinematic
** Constraint: CONSTRAINT-44
*Coupling, constraint name=CONSTRAINT-44, ref node=S-44, surface=S-44
*Kinematic
** Constraint: CONSTRAINT-45
*Coupling, constraint name=CONSTRAINT-45, ref node=S-45, surface=S-45
*Kinematic
** Constraint: CONSTRAINT-46
*Coupling, constraint name=CONSTRAINT-46, ref node=S-46, surface=S-46
*Kinematic
** Constraint: CONSTRAINT-47
*Coupling, constraint name=CONSTRAINT-47, ref node=S-47, surface=S-47
*Kinematic
** Constraint: CONSTRAINT-48
*Coupling, constraint name=CONSTRAINT-48, ref node=S-48, surface=S-48
*Kinematic
** Constraint: CONSTRAINT-49
*Coupling, constraint name=CONSTRAINT-49, ref node=S-49, surface=S-49
*Kinematic
** Constraint: CONSTRAINT-50
*Coupling, constraint name=CONSTRAINT-50, ref node=S-50, surface=S-50
*Kinematic
** Constraint: CONSTRAINT-51
*Coupling, constraint name=CONSTRAINT-51, ref node=S-51, surface=S-51
*Kinematic
** Constraint: CONSTRAINT-52
*Coupling, constraint name=CONSTRAINT-52, ref node=S-52, surface=S-52
*Kinematic
** Constraint: CONSTRAINT-53
*Coupling, constraint name=CONSTRAINT-53, ref node=S-53, surface=S-53
*Kinematic
** Constraint: CONSTRAINT-54
*Coupling, constraint name=CONSTRAINT-54, ref node=S-54, surface=S-54
*Kinematic
** Constraint: CONSTRAINT-55
*Coupling, constraint name=CONSTRAINT-55, ref node=S-55, surface=S-55
*Kinematic
** Constraint: CONSTRAINT-56
*Coupling, constraint name=CONSTRAINT-56, ref node=S-56, surface=S-56
*Kinematic
** Constraint: CONSTRAINT-57
*Coupling, constraint name=CONSTRAINT-57, ref node=S-57, surface=S-57
*Kinematic
** Constraint: CONSTRAINT-58
*Coupling, constraint name=CONSTRAINT-58, ref node=S-58, surface=S-58
*Kinematic
** Constraint: CONSTRAINT-59
*Coupling, constraint name=CONSTRAINT-59, ref node=S-59, surface=S-59
*Kinematic
** Constraint: CONSTRAINT-60
*Coupling, constraint name=CONSTRAINT-60, ref node=S-60, surface=S-60
*Kinematic
** Constraint: CONSTRAINT-61
*Coupling, constraint name=CONSTRAINT-61, ref node=S-61, surface=S-61
*Kinematic
** Constraint: CONSTRAINT-62
*Coupling, constraint name=CONSTRAINT-62, ref node=S-62, surface=S-62
*Kinematic
** Constraint: CONSTRAINT-63
*Coupling, constraint name=CONSTRAINT-63, ref node=S-63, surface=S-63
*Kinematic
** Constraint: CONSTRAINT-64
*Coupling, constraint name=CONSTRAINT-64, ref node=S-64, surface=S-64
*Kinematic
** Constraint: CONSTRAINT-65
*Coupling, constraint name=CONSTRAINT-65, ref node=S-65, surface=S-65
*Kinematic
** Constraint: CONSTRAINT-66
*Coupling, constraint name=CONSTRAINT-66, ref node=S-66, surface=S-66
*Kinematic
** Constraint: CONSTRAINT-67
*Coupling, constraint name=CONSTRAINT-67, ref node=S-67, surface=S-67
*Kinematic
** Constraint: CONSTRAINT-68
*Coupling, constraint name=CONSTRAINT-68, ref node=S-68, surface=S-68
*Kinematic
** Constraint: CONSTRAINT-69
*Coupling, constraint name=CONSTRAINT-69, ref node=S-69, surface=S-69
*Kinematic
** Constraint: CONSTRAINT-70
*Coupling, constraint name=CONSTRAINT-70, ref node=S-70, surface=S-70
*Kinematic
** Constraint: CONSTRAINT-71
*Coupling, constraint name=CONSTRAINT-71, ref node=S-71, surface=S-71
*Kinematic
** Constraint: CONSTRAINT-72
*Coupling, constraint name=CONSTRAINT-72, ref node=S-72, surface=S-72
*Kinematic
** Constraint: Embed-1
*Embedded Element, host elset=PART-1-1.RING-1
_M361
** Constraint: RigidBody-1
*Rigid Body, ref node=_PickedSet362, elset=PART-1-1.ROAD
** Constraint: TIE-1
*Tie, name=TIE-1, adjust=yes
TREAD-RING1, RING1-TREAD
** Constraint: TIE-2
*Tie, name=TIE-2, adjust=yes, position tolerance=0.15
SPOKE-RING1, RING1-SPOKE
*End Assembly
**
** MATERIALS
**
*Material, name=HUB
*Density
 2.8e-09,
*Elastic
72000., 0.33
*Material, name=PU-A
*Density
 1.1e-09,
*Hyperelastic, marlow, poisson=0.452
*Uniaxial Test Data
      0.,    0.
 1.09352, 0.014
 2.46103, 0.039
 3.39318, 0.062
 4.11373, 0.087
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 32.1619, 5.349
*Material, name=PU-A-055
*Density
 1.1e-09,
*Hyperelastic, marlow, poisson=0.452
*Uniaxial Test Data
       0.,    0.
 0.601873, 0.014
  1.35455, 0.039
  1.86761, 0.062
   2.2642, 0.087
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  17.7019, 5.349
*Material, name="PU-A-Neo Hookean"
*Density
 1.1e-09,
*Hyperelastic, neo hooke
 8.95259,0.
*Material, name="PU-A-Neo Hookean-055"
*Density
 1.1e-09,
*Hyperelastic, neo hooke
 6.5976,0.
*Material, name=PU-B
*Density
 1.1e-09,
*Hyperelastic, marlow, poisson=0.452
*Uniaxial Test Data
       0.,    0.
 0.827081, 0.014
  1.81926, 0.038
  2.45799, 0.063
  2.95153,  0.09
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  35.2532, 7.407
*Material, name=PU-C
*Density
 1.1e-09,
*Hyperelastic, marlow, poisson=0.452
*Uniaxial Test Data
      0.,    0.
 1.31846, 0.004
 2.02851, 0.032
 2.41846, 0.059
 2.70481, 0.087
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  17.253, 3.296
*Material, name=SURFACE
*Density
 7.8e-09,
*Elastic
210000., 0.29
*Plastic
1240.,0.
*Material, name=TREAD
*Density
 1.1e-09,
*Elastic
 4.87, 0.48
**
** INTERACTION PROPERTIES
**
*Surface Interaction, name=INTPROP-1
1.,
*Friction, slip tolerance=0.005
 0.8,
*Surface Behavior, pressure-overclosure=HARD
**
** INTERACTIONS
**
** Interaction: INTPROP-1-1
*Contact Pair, interaction=INTPROP-1, adjust=0.01
TREAD-ROAD, ROAD-TREAD
** ----------------------------------------------------------------
**
** STEP: Step-1
**
*Step, name=Step-1, nlgeom=YES, inc=200
*Static
0.02, 1., 1e-05, 1.
**
** BOUNDARY CONDITIONS
**
** Name: Disp-BC-1 Type: Displacement/Rotation
*Boundary
ROAD-RP, 1, 1
** Name: Disp-BC-2 Type: Displacement/Rotation
*Boundary
ROAD-RP, 3, 3
** Name: Disp-BC-3 Type: Displacement/Rotation
*Boundary
ROAD-RP, 4, 4
** Name: Disp-BC-4 Type: Displacement/Rotation
*Boundary
ROAD-RP, 5, 5
** Name: Disp-BC-5 Type: Displacement/Rotation
*Boundary
ROAD-RP, 6, 6
** Name: Disp-BC-6 Type: Displacement/Rotation
*Boundary
SET-SPOKEENDS, 1, 1
** Name: Disp-BC-7 Type: Displacement/Rotation
*Boundary
SET-SPOKEENDS, 2, 2
** Name: Disp-BC-8 Type: Displacement/Rotation
*Boundary
SET-SPOKEENDS, 3, 3
** Name: Disp-BC-9 Type: Displacement/Rotation
*Boundary
SET-SPOKEENDS, 4, 4
** Name: Disp-BC-10 Type: Displacement/Rotation
*Boundary
SET-SPOKEENDS, 5, 5
** Name: Disp-BC-11 Type: Displacement/Rotation
*Boundary
SET-SPOKEENDS, 6, 6
**
** LOADS
**
** Name: CFORCE-1   Type: Concentrated force
*Cload
ROAD-RP, 2, 6850.2
**
** OUTPUT REQUESTS
**
*Restart, write, number interval=1, time marks=YES
**
** FIELD OUTPUT: F-Output-1
**
*Output, field, variable=PRESELECT, time interval=0.01
**
** HISTORY OUTPUT: H-Output-1
**
*Output, history, variable=PRESELECT
**
** HISTORY OUTPUT: H-Output-2
**
*Output, history, number interval=100
*Contact Output, master=ROAD-TREAD, slave=TREAD-ROAD
CAREA, CFN1, CFN2, CFN3, CFNM
*End Step
